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/batch
! ANSYS input file written by Workbench version 17.1 ALPHA
! File used for geometry attach: I:\Projects_2009-2010\WB_cyc_modal\WB_verification_cyc_modal_dated_22032010\Sector_model_files\dp0\SYS\DM\SYS.agdb
/title,TechDemoWB--Static Structural (A5)
/com,--- Data in consistent BIN units. See Solving Units in the help system for more information.
/units,BIN
/prep7
! Turn off shape checking because checks already performed inside WB mesher.
! See help system for more information.
SHPP,OFF,,NOWARN
etcon,set             ! allow ANSYS to choose best KEYOP's for 180x elements
/com,*********** Nodes for the whole assembly ***********
nblock,3
(1i9,3e20.9e3)
        1    3.005479520E+000    4.655000000E+000    2.331846661E+000
        2    2.714782676E+000    4.655000000E+000    2.243755562E+000
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-1
/com,*********** Elements for Body 1 "Impeller" ***********
et,1,187
eblock,19,solid,,12607
(19i9)
        1        1        1        1        0        0        0        0       10        0    10797      757      868     4434      880    11588    12392    11591    11589
    12390    12449
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-1
/com,*********** Elements for Body 2 "Shroud" ***********
et,2,187
eblock,19,solid,,10796
(19i9)
        2        2        1        2        0        0        0        0       10        0        1       95     4312     3802       96     7037    28976     7036     7034
     7043     7042
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-1
/com,*********** Send User Defined Coordinate System(s) ***********
local,12,1,3.27612167753735e-016,5.4199998475843,3.27612167753735e-016,-0.,-90.,-0.
csys,0
toffst,459.67,  ! Temperature offset from absolute zero
/com,*********** Set Reference Temperature ***********
tref,71.6
/com,*********** Send Materials ***********
MP,DENS,1,0.000734544640797411,	! slinch in^-3
MP,ALPX,1,6.66666666666667e-06,	! F^-1
MP,C,1,373722.969668162,	! in^2 s^-2 F^-1
MP,KXX,1,7.55607988605186,	! slinch in s^-3 F^-1
MP,RSVX,1,8.52348993288591,	! ohm cmil in^-1
MP,EX,1,29007553.3841765,	! slinch s^-2 in^-1
MP,NUXY,1,0.3,
MP,MURX,1,10000,

MP,DENS,2,0.000734544640797411,	! slinch in^-3
MP,ALPX,2,6.66666666666667e-06,	! F^-1
MP,C,2,373722.969668162,	! in^2 s^-2 F^-1
MP,KXX,2,7.55607988605186,	! slinch in s^-3 F^-1
MP,RSVX,2,8.52348993288591,	! ohm cmil in^-1
MP,EX,2,29007553.3841765,	! slinch s^-2 in^-1
MP,NUXY,2,0.3,
MP,MURX,2,10000,

!************************* Model Summary ********************
!Impeller,	Structural Steel,	matid,	1
!Shroud,	Structural Steel,	matid,	2
!************************* End Model Summary ********************
/com,*********** Create Contact "Contact Region 2" ***********
*set,tid,4
*set,cid,3
r,tid
r,cid
et,tid,170
et,cid,174
eblock,10,,,403
(15i9)
    23404        4        4        4        0      401     1507      391      391     9108     9030      391     9029
    23405        4        4        4        0     1507      400      390      390     9102     9020      390     9021
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-1
eblock,10,,,403
(15i9)
    23807        3        3        3        0      401     1507      391      391     9108     9030      391     9029
    23808        3        3        3        0     1507      400      390      390     9102     9020      390     9021
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-1
eblock,10,,,165
(15i9)
    24210        3        4        3        0     1575     1576     1574     1574    17166    17160     1574    17159
    24211        3        4        3        0     1576      653     1574     1574    10748    10747     1574    17160
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-1
eblock,10,,,165
(15i9)
    24375        4        3        4        0     1575     1576     1574     1574    17166    17160     1574    17159
    24376        4        3        4        0     1576      653     1574     1574    10748    10747     1574    17160
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-1
keyo,cid,12,5              ! bonded always
keyo,cid,2,1               ! penalty function only
keyo,cid,4,0               ! on Gauss point (from Program Controlled setting)
keyo,cid,9,1               ! ignore initial gaps/penetration
keyo,cid,7,0               ! No Prediction
rmod,tid,3,10.	! FKN
rmod,tid,5,0.	! ICONT
rmod,tid,6,0.	! PINB
rmod,tid,10,0.	! CNOF
rmod,tid,12,0.	! FKT
rmod,tid,36,138	! WB DSID
rmod,cid,3,10.	! FKN
rmod,cid,5,0.	! ICONT
rmod,cid,6,0.	! PINB
rmod,cid,10,0.	! CNOF
rmod,cid,12,0.	! FKT
rmod,cid,36,138	! WB DSID
nsel,all
esel,all
/com,*********** Send Named Selection as Node Component ***********
CMBLOCK,MAIN_BLADE,NODE,     1799
(8i10)
       653       654       655       656       657       658       659       660
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/com,*********** Send Named Selection as Node Component ***********
CMBLOCK,SPLITTER,NODE,      970
(8i10)
       669       670       671       672       673       674       675       676
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/com,*********** Send Named Selection as Node Component ***********
CMBLOCK,HUB_WALL,NODE,     1346
(8i10)
       542       543       544       545       546       547       548       549
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CMBLOCK,_CM173_FIXEDSU,NODE,      190
(8i10)
       634       635       636       637       638       639       640       641
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/com,*********** Fixed Supports ***********
CMBLOCK,_FIXEDSU,NODE,      190
(8i10)
       634       635       636       637       638       639       640       641
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cmsel,s,_FIXEDSU
d,all,all
nsel,all
nsel,all
/com,*********** Node Rotations ***********
nmod,119,,,,0.,0.,27.6923076923077
nmod,120,,,,0.,0.,27.6923076923077
nmod,121,,,,0.,0.,27.6923076923077
nmod,122,,,,0.,0.,27.6923076923077
nmod,165,,,,0.,0.,27.6923076923077
nmod,189,,,,0.,0.,27.6923076923077
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nmod,23156,,,,0.,0.,27.6923076923077
/com,*********** Define Pressure Using Surface Effect Elements ***********
et,5,154
eblock,10,,,852
(15i9)
    24540        5        5        5        0     2685     2691     2709     2709    23253    23311     2709    23256
    24541        5        5        5        0     2684     2711     2695     2695    23244    23340     2695    23243
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-1
esel,s,type,,5
esel,all

*DIM,_loadvari183,TABLE,2,1,1,TIME,
! Time values
_loadvari183(1,0,1) = 0.
_loadvari183(2,0,1) = 1.
! Load values
_loadvari183(1,1,1) = 0.
_loadvari183(2,1,1) = 2900.75574298382

/com,*********** Define Pressure Using Surface Effect Elements ***********
et,6,154
eblock,10,,,429
(15i9)
    25392        6        6        6        0      699     2897     2899     2899    11077    24093     2899    11079
    25393        6        6        6        0      688     2893      702      702    10983    11099      702    10978
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-1
esel,s,type,,6
esel,all

*DIM,_loadvari185,TABLE,2,1,1,TIME,
! Time values
_loadvari185(1,0,1) = 0.
_loadvari185(2,0,1) = 1.
! Load values
_loadvari185(1,1,1) = 0.
_loadvari185(2,1,1) = 2900.75574298382

/com,*********** Define Pressure Using Surface Effect Elements ***********
et,7,154
eblock,10,,,537
(15i9)
    25821        7        7        7        0     1618      943      564      564    12906    10185      564    10188
    25822        7        7        7        0      949     1619     1567     1567    12950    17129     1567    12949
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-1
esel,s,type,,7
esel,all

*DIM,_loadvari187,TABLE,2,1,1,TIME,
! Time values
_loadvari187(1,0,1) = 0.
_loadvari187(2,0,1) = 1.
! Load values
_loadvari187(1,1,1) = 0.
_loadvari187(2,1,1) = 2900.75574298382

esel,all
/com,*********** Define Rotational Velocity ***********
cglo,3.27612167753735e-016,5.4199998475843,3.27612167753735e-016

*DIM,_loadvari212x,TABLE,2,1,1,TIME,
! Time values
_loadvari212x(1,0,1) = 0.
_loadvari212x(2,0,1) = 1.
! Load values
_loadvari212x(1,1,1) = 0.
_loadvari212x(2,1,1) = 0.


*DIM,_loadvari212y,TABLE,2,1,1,TIME,
! Time values
_loadvari212y(1,0,1) = 0.
_loadvari212y(2,0,1) = 1.
! Load values
_loadvari212y(1,1,1) = 0.
_loadvari212y(2,1,1) = 3000.


*DIM,_loadvari212z,TABLE,2,1,1,TIME,
! Time values
_loadvari212z(1,0,1) = 0.
_loadvari212z(2,0,1) = 1.
! Load values
_loadvari212z(1,1,1) = 0.
_loadvari212z(2,1,1) = 0.

/com,*********** Create Periodic/Cyclic Symmetry ***********
CYCOPT,USRROT,1
CYCOPT,STATUS
*DIM,_CYCLICMAP,ARRAY,2,2255
*SET,_CYCLICMAP(1,1),1,267
*SET,_CYCLICMAP(1,2),2,245
*SET,_CYCLICMAP(1,3),3,270
*SET,_CYCLICMAP(1,4),4,269
*SET,_CYCLICMAP(1,5),5,268
*SET,_CYCLICMAP(1,6),6,221
*SET,_CYCLICMAP(1,7),7,165
*SET,_CYCLICMAP(1,8),8,189
*SET,_CYCLICMAP(1,9),9,204
*SET,_CYCLICMAP(1,10),10,203
*SET,_CYCLICMAP(1,11),11,202
*SET,_CYCLICMAP(1,12),12,201
*SET,_CYCLICMAP(1,13),13,200
*SET,_CYCLICMAP(1,14),14,199
*SET,_CYCLICMAP(1,15),15,198
*SET,_CYCLICMAP(1,16),16,197
*SET,_CYCLICMAP(1,17),17,196
*SET,_CYCLICMAP(1,18),18,195
*SET,_CYCLICMAP(1,19),19,194
*SET,_CYCLICMAP(1,20),20,193
*SET,_CYCLICMAP(1,21),21,192
*SET,_CYCLICMAP(1,22),22,191
*SET,_CYCLICMAP(1,23),23,190
*SET,_CYCLICMAP(1,24),24,468
*SET,_CYCLICMAP(1,25),25,486
*SET,_CYCLICMAP(1,26),26,467
*SET,_CYCLICMAP(1,27),27,469
*SET,_CYCLICMAP(1,28),28,458
*SET,_CYCLICMAP(1,29),29,440
*SET,_CYCLICMAP(1,30),30,466
*SET,_CYCLICMAP(1,31),31,465
*SET,_CYCLICMAP(1,32),32,464
*SET,_CYCLICMAP(1,33),33,463
*SET,_CYCLICMAP(1,34),34,462
*SET,_CYCLICMAP(1,35),35,461
*SET,_CYCLICMAP(1,36),36,460
*SET,_CYCLICMAP(1,37),37,459
*SET,_CYCLICMAP(1,38),38,419
*SET,_CYCLICMAP(1,39),39,445
*SET,_CYCLICMAP(1,40),40,444
*SET,_CYCLICMAP(1,41),41,443
*SET,_CYCLICMAP(1,42),42,442
*SET,_CYCLICMAP(1,43),43,441
*SET,_CYCLICMAP(1,44),44,405
*SET,_CYCLICMAP(1,45),45,429
*SET,_CYCLICMAP(1,46),46,428
*SET,_CYCLICMAP(1,47),47,427
*SET,_CYCLICMAP(1,48),48,426
*SET,_CYCLICMAP(1,49),49,425
*SET,_CYCLICMAP(1,50),50,424
*SET,_CYCLICMAP(1,51),51,423
*SET,_CYCLICMAP(1,52),52,422
*SET,_CYCLICMAP(1,53),53,421
*SET,_CYCLICMAP(1,54),54,420
*SET,_CYCLICMAP(1,55),55,395
*SET,_CYCLICMAP(1,56),56,410
*SET,_CYCLICMAP(1,57),57,409
*SET,_CYCLICMAP(1,58),58,408
*SET,_CYCLICMAP(1,59),59,407
*SET,_CYCLICMAP(1,60),60,406
*SET,_CYCLICMAP(1,61),61,380
*SET,_CYCLICMAP(1,62),62,404
*SET,_CYCLICMAP(1,63),63,370
*SET,_CYCLICMAP(1,64),64,386
*SET,_CYCLICMAP(1,65),65,385
*SET,_CYCLICMAP(1,66),66,384
*SET,_CYCLICMAP(1,67),67,383
*SET,_CYCLICMAP(1,68),68,382
*SET,_CYCLICMAP(1,69),69,381
*SET,_CYCLICMAP(1,70),70,360
*SET,_CYCLICMAP(1,71),71,371
*SET,_CYCLICMAP(1,72),72,349
*SET,_CYCLICMAP(1,73),73,336
*SET,_CYCLICMAP(1,74),74,350
*SET,_CYCLICMAP(1,75),75,321
*SET,_CYCLICMAP(1,76),76,348
*SET,_CYCLICMAP(1,77),77,347
*SET,_CYCLICMAP(1,78),78,346
*SET,_CYCLICMAP(1,79),79,296
*SET,_CYCLICMAP(1,80),80,326
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*SET,_CYCLICMAP(1,2255),33215,22511
CYCLIC,13,,12,,,_CYCLICMAP
fini
/com,****************************************************************************
/com,*************************    SOLUTION       ********************************
/com,****************************************************************************
/solu
antype,0                   ! static analysis
neqit,1,force              ! Force 1 eq iteration since only nonlinearity is bonded/no sep contact
pred,off
eqsl,pcg,1e-8,,,,,,1
cntr,print,1               ! print out contact info and also make no initial contact an error
nldiag,cont,iter           ! print out contact info each equilibrium iteration
resc,linear,last           ! Turn on restart files due to future eigen analysis intent
/com,****************************************************
/com,******************* SOLVE FOR LS 1 ****************
esel,s,type,,5
nsle
sf,all,pres,%_loadvari183%
esel,s,type,,6
nsle
sf,all,pres,%_loadvari185%
esel,s,type,,7
nsle
sf,all,pres,%_loadvari187%
nsel,all
esel,all
cgom,%_loadvari212x%,%_loadvari212y%,%_loadvari212z%
esel,all
nsub,1,1,1
time,1.
outres,erase
outres,all,none
outres,nsol,all
outres,rsol,all
outres,nload,all
outres,strs,all
outres,epel,all
outres,eppl,all
stabilize,off                   ! Stabilization turned OFF by user
! *********** WB SOLVE COMMAND ***********
! check interactive state
*get,ANSINTER_,active,,int
