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/batch
! ANSYS input file written by Workbench version 17.0 RELEASE
! File used for geometry attach: C:\Users\aprietop\Documents\2024\DAIHATSU TERIOS 2006-2018 TRAS\MODELADO\RESORTE DAIHATSU TERIOS II TRAS.stp
/title,DAIHATSU TERIOS 2006-2018 TRAS--Static Structural (B5)
/com,--- Data in consistent NMM units. See Solving Units in the help system for more information.
/units,MPA
/prep7
! Turn off shape checking because checks already performed inside WB mesher.
! See help system for more information.
SHPP,OFF,,NOWARN
etcon,set             ! allow ANSYS to choose best KEYOP's for 180x elements
/com,*********** Nodes for the whole assembly ***********
nblock,3
(1i9,3e20.9e3)
        1   -1.185044089E+001   -2.257912865E+001    2.977656340E+002
        2   -2.098608858E+001   -1.448565104E+001    2.977656340E+002
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-1
/com,*********** Elements for Body 1 "COPELA INFERIOR" ***********
/com,*********** Send Body as a Rigid Body ***********
et,1,21
keyo,1,2,1             ! Moments of inertia in nodal coordinates
keyo,1,3,0         ! 3D Mass With Rotary Intertia
r,1,1.60536515571794e-003,1.60536515571794e-003,1.60536515571794e-003,2.04142480272468,3.95572228452516,2.04142456578933
local,11,0,-5.13459340413593e-015,-5.56392769780463e-015,7.22852023840872,58.5052130976914,-90.,-144.017460488243
nrot,796
csys,0
mat,1
real,1
type,1
en,242,796
/com,*********** Elements for Body 2 "COPELA SUPERIOR" ***********
/com,*********** Send Body as a Rigid Body ***********
et,2,21
keyo,2,2,1             ! Moments of inertia in nodal coordinates
keyo,2,3,0         ! 3D Mass With Rotary Intertia
r,2,1.56685621982858e-003,1.56685621982858e-003,1.56685621982858e-003,2.02110860305092,3.93016473876013,2.02110836611626
local,11,0,7.02054637989773e-015,-3.32612627123886e-015,317.847950314917,-35.9825395117566,90.,35.9825395117566
nrot,414
csys,0
mat,2
real,2
type,2
en,126,414
/com,*********** Elements for Body 3 "RESORTE HEL DAIHATSU TERIOS II TRAS" ***********
et,3,186
keyo,3,2,1          ! set full integration on SOLID186
eblock,19,solid,,1730
(19i9)
        3        3        3        3        0        0        0        0       20        0      243     1153     1154     1155     1156     1314     1315     1316     1317
     5675     5679     5682     5676     6048     6050     6051     6049     5678     5681     5684     5687
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-1
/com,*********** Send User Defined Coordinate System(s) ***********
local,12,0,2.72683397023509e-016,3.68883294627643e-015,2.23517418115882e-007,-180.,2.43661672115028e-015,180.
local,13,0,-1.6648890957689e-015,3.30302725379864e-015,324.765633765238,180.,-7.01670939542413e-015,90.
csys,0
toffst,273.15,  ! Temperature offset from absolute zero
/com,*********** Set Reference Temperature ***********
tref,22.
/com,*********** Send Materials ***********
MP,DENS,1,7.85e-09,	! tonne mm^-3
MP,ALPX,1,1.2e-05,	! C^-1
MP,C,1,434000000,	! mm^2 s^-2 C^-1
MP,KXX,1,60.5,	! tonne mm s^-3 C^-1
MP,RSVX,1,0.00017,	! ohm mm
MP,EX,1,200000,	! tonne s^-2 mm^-1
MP,NUXY,1,0.3,
MP,MURX,1,10000,

MP,DENS,2,7.85e-09,	! tonne mm^-3
MP,ALPX,2,1.2e-05,	! C^-1
MP,C,2,434000000,	! mm^2 s^-2 C^-1
MP,KXX,2,60.5,	! tonne mm s^-3 C^-1
MP,RSVX,2,0.00017,	! ohm mm
MP,EX,2,200000,	! tonne s^-2 mm^-1
MP,NUXY,2,0.3,
MP,MURX,2,10000,

Mean Stress = 'UF01' ! Mean Stress
MP,DENS,3,7.85e-09,	! tonne mm^-3
MP,ALPX,3,1.2e-05,	! C^-1
MP,C,3,434000000,	! mm^2 s^-2 C^-1
MP,KXX,3,60.5,	! tonne mm s^-3 C^-1
MP,RSVX,3,0.00017,	! ohm mm
MP,EX,3,210000,	! tonne s^-2 mm^-1
MP,NUXY,3,0.3125,
MP,MURX,3,10000,

!************************* Model Summary ********************
!COPELA INFERIOR,	Structural Steel,	matid,	1
!COPELA SUPERIOR,	Structural Steel,	matid,	2
!RESORTE HEL DAIHATSU TERIOS II TRAS,	SAE 9254 NL 50 HRC SHOT PEENING LINEAR,	matid,	3
!************************* End Model Summary ********************
/com,*********** Create Contact "Frictional - RESORTE HEL DAIHATSU TERIOS II TRAS To COPELA SUPERIOR" ***********
! ********* Create Contact to Connect To Rigid Body Mass Node ***********
*set,tid,4
*set,cid,4
et,tid,170
keyo,tid,2,1           ! Set MPC target element and not fix pilot
keyo,tid,4,0           ! Create CE's for all DOFs
type,tid
mat ,cid
real,cid
tshape,pilo
en,1979,414
tshape
! ********* End of Create Contact to Connect To Rigid Body Mass Node ***********
! ******--- Create Insulation Layer on Rigid Body for Surface BC's ---********
eblock,10,,,125
(15i9)
     1980        4        4        4        0       60      105       57       57      286      278       57      276
     1981        4        4        4        0       62       41       40       64      231      227      228      290
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-1
! ******--- End Create Insulation Layer on Rigid Body for Surface BC's ---********
*set,tid,6
*set,cid,5
r,tid
r,cid
et,tid,170
et,cid,174
eblock,10,,,856
(15i9)
     2105        5        5        5        0     3570     3601     3763     3608    10843    10877    10892    10845
     2106        5        5        5        0     3692     3784     3785     3762    11102    11266    11242    11101
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-1
eblock,10,,,125
(15i9)
     2961        6        5        6        0       60      105       57       57      286      278       57      276
     2962        6        5        6        0       62       41       40       64      231      227      228      290
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-1
esel,s,type,,5
cm,_AllContacts,elem
! ******--- Create Pilot Element For Rigid Targets ---********
mat,5
real,5
type,6
tshape,pilo
en,3086,414
tshape
! ******--- End Create Pilot Element For Rigid Targets ---********
keyo,tid,2,1               ! Don't fix the pilot node since scoped to rigid body
keyo,cid,10,2              ! adjust contact stiffness each NR iteration
keyo,cid,6,2               ! Allow for aggressive changes to stiffness
keyo,cid,12,0              ! standard contact
mp,mu,cid,0.3	! unitless
keyo,cid,2,0               ! augmented Lagrange
keyo,cid,4,0               ! on Gauss point
keyo,cid,9,1               ! ignore initial gaps/penetration
keyo,cid,5,1               ! auto CNOF adjustment to close geometric gap only
keyo,cid,7,0               ! No Prediction
rmod,cid,3,1.	! FKN
rmod,cid,5,0.	! ICONT
rmod,cid,6,0.	! PINB
rmod,cid,10,0.	! CNOF
rmod,cid,12,0.	! FKT
rmod,cid,36,52	! WB DSID
mp,ex,cid,210000.	! EX of underlying rigid body
/com,*********** Create Contact "Frictional - RESORTE HEL DAIHATSU TERIOS II TRAS To COPELA INFERIOR" ***********
! ********* Create Contact to Connect To Rigid Body Mass Node ***********
*set,tid,7
*set,cid,7
et,tid,170
keyo,tid,2,1           ! Set MPC target element and not fix pilot
keyo,tid,4,0           ! Create CE's for all DOFs
type,tid
mat ,cid
real,cid
tshape,pilo
en,3087,796
tshape
! ********* End of Create Contact to Connect To Rigid Body Mass Node ***********
! ******--- Create Insulation Layer on Rigid Body for Surface BC's ---********
eblock,10,,,115
(15i9)
     3088        7        7        7        0      423      464      422      422      577      573      422      572
     3089        7        7        7        0      427      468      426      426      587      585      426      583
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-1
! ******--- End Create Insulation Layer on Rigid Body for Surface BC's ---********
*set,tid,9
*set,cid,8
r,tid
r,cid
et,tid,170
et,cid,174
eblock,10,,,1312
(15i9)
     3203        8        8        8        0     1555     1561     1828     1592     6561     6575     6608     6562
     3204        8        8        8        0     1599     1592     1828     1829     6607     6608     7146     6624
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-1
eblock,10,,,115
(15i9)
     4515        9        8        9        0      423      464      422      422      577      573      422      572
     4516        9        8        9        0      427      468      426      426      587      585      426      583
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-1
esel,s,type,,8
cm,contactElems53,elem
cmsel,a,_AllContacts,elem
cm,_AllContacts,elem
cmsel,s,contactElems53,elem
cmdele,contactElems53
! ******--- Create Pilot Element For Rigid Targets ---********
mat,8
real,8
type,9
tshape,pilo
en,4630,796
tshape
! ******--- End Create Pilot Element For Rigid Targets ---********
keyo,tid,2,1               ! Don't fix the pilot node since scoped to rigid body
keyo,cid,10,2              ! adjust contact stiffness each NR iteration
keyo,cid,6,2               ! Allow for aggressive changes to stiffness
keyo,cid,12,0              ! standard contact
mp,mu,cid,0.3	! unitless
keyo,cid,2,0               ! augmented Lagrange
keyo,cid,4,0               ! on Gauss point
keyo,cid,9,1               ! ignore initial gaps/penetration
keyo,cid,5,1               ! auto CNOF adjustment to close geometric gap only
keyo,cid,7,0               ! No Prediction
rmod,cid,3,1.	! FKN
rmod,cid,5,0.	! ICONT
rmod,cid,6,0.	! PINB
rmod,cid,10,0.	! CNOF
rmod,cid,12,0.	! FKT
rmod,cid,36,53	! WB DSID
mp,ex,cid,210000.	! EX of underlying rigid body
/com,*********** Create Contact "Frictional - RESORTE HEL DAIHATSU TERIOS II TRAS To RESORTE HEL DAIHATSU TERIOS II TRAS" ***********
*set,tid,11
*set,cid,10
r,tid
r,cid
et,tid,170
et,cid,174
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eblock,10,,,248
(15i9)
     4767       11       10       11        0     3317     3353     3571     3360    10311    10350    10365    10313
     4768       11       10       11        0     3476     3600     3601     3570    10655    10875    10843    10654
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-1
esel,s,type,,10
cm,contactElems54,elem
cmsel,a,_AllContacts,elem
cm,_AllContacts,elem
cmsel,s,contactElems54,elem
cmdele,contactElems54
keyo,cid,10,2              ! adjust contact stiffness each NR iteration
keyo,cid,6,2               ! Allow for aggressive changes to stiffness
keyo,cid,12,0              ! standard contact
mp,mu,cid,0.15	! unitless
keyo,cid,2,0               ! augmented Lagrange
keyo,cid,4,0               ! on Gauss point
keyo,cid,9,2               ! use real geometry with ramped effects
keyo,cid,7,0               ! No Prediction
rmod,cid,3,1.	! FKN
rmod,cid,5,0.	! ICONT
rmod,cid,6,0.	! PINB
rmod,cid,10,0.	! CNOF
rmod,cid,12,0.	! FKT
rmod,cid,36,54	! WB DSID
/com,*********** Create Contact "Frictional - RESORTE HEL DAIHATSU TERIOS II TRAS To RESORTE HEL DAIHATSU TERIOS II TRAS" ***********
*set,tid,13
*set,cid,12
r,tid
r,cid
et,tid,170
et,cid,174
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eblock,10,,,288
(15i9)
     5199       13       12       13        0     3028     3071     3318     3072     9699     9750     9753     9700
     5200       13       12       13        0     3208     3352     3353     3317    10093    10348    10311    10092
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-1
esel,s,type,,12
cm,contactElems55,elem
cmsel,a,_AllContacts,elem
cm,_AllContacts,elem
cmsel,s,contactElems55,elem
cmdele,contactElems55
keyo,cid,10,2              ! adjust contact stiffness each NR iteration
keyo,cid,6,2               ! Allow for aggressive changes to stiffness
keyo,cid,12,0              ! standard contact
mp,mu,cid,0.15	! unitless
keyo,cid,2,0               ! augmented Lagrange
keyo,cid,4,0               ! on Gauss point
keyo,cid,9,2               ! use real geometry with ramped effects
keyo,cid,7,0               ! No Prediction
rmod,cid,3,1.	! FKN
rmod,cid,5,0.	! ICONT
rmod,cid,6,0.	! PINB
rmod,cid,10,0.	! CNOF
rmod,cid,12,0.	! FKT
rmod,cid,36,55	! WB DSID
/com,*********** Create Contact "Frictional - RESORTE HEL DAIHATSU TERIOS II TRAS To RESORTE HEL DAIHATSU TERIOS II TRAS" ***********
*set,tid,15
*set,cid,14
r,tid
r,cid
et,tid,170
et,cid,174
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eblock,10,,,296
(15i9)
     5735       15       14       15        0     2731     2775     3033     2776     9069     9121     9124     9070
     5736       15       14       15        0     2783     2776     3033     3034     9123     9124     9710     9140
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-1
esel,s,type,,14
cm,contactElems56,elem
cmsel,a,_AllContacts,elem
cm,_AllContacts,elem
cmsel,s,contactElems56,elem
cmdele,contactElems56
keyo,cid,10,2              ! adjust contact stiffness each NR iteration
keyo,cid,6,2               ! Allow for aggressive changes to stiffness
keyo,cid,12,0              ! standard contact
mp,mu,cid,0.15	! unitless
keyo,cid,2,0               ! augmented Lagrange
keyo,cid,4,0               ! on Gauss point
keyo,cid,9,2               ! use real geometry with ramped effects
keyo,cid,7,0               ! No Prediction
rmod,cid,3,1.	! FKN
rmod,cid,5,0.	! ICONT
rmod,cid,6,0.	! PINB
rmod,cid,10,0.	! CNOF
rmod,cid,12,0.	! FKT
rmod,cid,36,56	! WB DSID
/com,*********** Create Contact "Frictional - RESORTE HEL DAIHATSU TERIOS II TRAS To RESORTE HEL DAIHATSU TERIOS II TRAS" ***********
*set,tid,17
*set,cid,16
r,tid
r,cid
et,tid,170
et,cid,174
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eblock,10,,,304
(15i9)
     6319       17       16       17        0     2427     2471     2736     2472     8423     8475     8478     8424
     6320       17       16       17        0     2479     2472     2736     2737     8477     8478     9080     8494
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-1
esel,s,type,,16
cm,contactElems57,elem
cmsel,a,_AllContacts,elem
cm,_AllContacts,elem
cmsel,s,contactElems57,elem
cmdele,contactElems57
keyo,cid,10,2              ! adjust contact stiffness each NR iteration
keyo,cid,6,2               ! Allow for aggressive changes to stiffness
keyo,cid,12,0              ! standard contact
mp,mu,cid,0.15	! unitless
keyo,cid,2,0               ! augmented Lagrange
keyo,cid,4,0               ! on Gauss point
keyo,cid,9,2               ! use real geometry with ramped effects
keyo,cid,7,0               ! No Prediction
rmod,cid,3,1.	! FKN
rmod,cid,5,0.	! ICONT
rmod,cid,6,0.	! PINB
rmod,cid,10,0.	! CNOF
rmod,cid,12,0.	! FKT
rmod,cid,36,57	! WB DSID
/com,*********** Create Contact "Frictional - RESORTE HEL DAIHATSU TERIOS II TRAS To RESORTE HEL DAIHATSU TERIOS II TRAS" ***********
*set,tid,19
*set,cid,18
r,tid
r,cid
et,tid,170
et,cid,174
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eblock,10,,,304
(15i9)
     6919       19       18       19        0     2123     2167     2432     2168     7777     7829     7832     7778
     6920       19       18       19        0     2175     2168     2432     2433     7831     7832     8434     7848
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-1
esel,s,type,,18
cm,contactElems58,elem
cmsel,a,_AllContacts,elem
cm,_AllContacts,elem
cmsel,s,contactElems58,elem
cmdele,contactElems58
keyo,cid,10,2              ! adjust contact stiffness each NR iteration
keyo,cid,6,2               ! Allow for aggressive changes to stiffness
keyo,cid,12,0              ! standard contact
mp,mu,cid,0.15	! unitless
keyo,cid,2,0               ! augmented Lagrange
keyo,cid,4,0               ! on Gauss point
keyo,cid,9,2               ! use real geometry with ramped effects
keyo,cid,7,0               ! No Prediction
rmod,cid,3,1.	! FKN
rmod,cid,5,0.	! ICONT
rmod,cid,6,0.	! PINB
rmod,cid,10,0.	! CNOF
rmod,cid,12,0.	! FKT
rmod,cid,36,58	! WB DSID
/com,*********** Create Contact "Frictional - RESORTE HEL DAIHATSU TERIOS II TRAS To RESORTE HEL DAIHATSU TERIOS II TRAS" ***********
*set,tid,21
*set,cid,20
r,tid
r,cid
et,tid,170
et,cid,174
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eblock,10,,,304
(15i9)
     7527       21       20       21        0     1823     1863     2128     1864     7135     7183     7186     7136
     7528       21       20       21        0     1871     1864     2128     2129     7185     7186     7788     7202
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-1
esel,s,type,,20
cm,contactElems59,elem
cmsel,a,_AllContacts,elem
cm,_AllContacts,elem
cmsel,s,contactElems59,elem
cmdele,contactElems59
keyo,cid,10,2              ! adjust contact stiffness each NR iteration
keyo,cid,6,2               ! Allow for aggressive changes to stiffness
keyo,cid,12,0              ! standard contact
mp,mu,cid,0.15	! unitless
keyo,cid,2,0               ! augmented Lagrange
keyo,cid,4,0               ! on Gauss point
keyo,cid,9,2               ! use real geometry with ramped effects
keyo,cid,7,0               ! No Prediction
rmod,cid,3,1.	! FKN
rmod,cid,5,0.	! ICONT
rmod,cid,6,0.	! PINB
rmod,cid,10,0.	! CNOF
rmod,cid,12,0.	! FKT
rmod,cid,36,59	! WB DSID
/com,*********** Create Contact "Frictional - RESORTE HEL DAIHATSU TERIOS II TRAS To RESORTE HEL DAIHATSU TERIOS II TRAS" ***********
*set,tid,23
*set,cid,22
r,tid
r,cid
et,tid,170
et,cid,174
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eblock,10,,,272
(15i9)
     8135       23       22       23        0     1555     1561     1828     1592     6561     6575     6608     6562
     8136       23       22       23        0     1599     1592     1828     1829     6607     6608     7146     6624
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-1
esel,s,type,,22
cm,contactElems60,elem
cmsel,a,_AllContacts,elem
cm,_AllContacts,elem
cmsel,s,contactElems60,elem
cmdele,contactElems60
keyo,cid,10,2              ! adjust contact stiffness each NR iteration
keyo,cid,6,2               ! Allow for aggressive changes to stiffness
keyo,cid,12,0              ! standard contact
mp,mu,cid,0.15	! unitless
keyo,cid,2,0               ! augmented Lagrange
keyo,cid,4,0               ! on Gauss point
keyo,cid,9,2               ! use real geometry with ramped effects
keyo,cid,7,0               ! No Prediction
rmod,cid,3,1.	! FKN
rmod,cid,5,0.	! ICONT
rmod,cid,6,0.	! PINB
rmod,cid,10,0.	! CNOF
rmod,cid,12,0.	! FKT
rmod,cid,36,60	! WB DSID
/com,*********** Create Contact "Frictional - RESORTE HEL DAIHATSU TERIOS II TRAS To RESORTE HEL DAIHATSU TERIOS II TRAS" ***********
*set,tid,25
*set,cid,24
r,tid
r,cid
et,tid,170
et,cid,174
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eblock,10,,,240
(15i9)
     8711       25       24       25        0     1548     1560     1561     1555     6546     6572     6561     6545
     8712       25       24       25        0     1548     1541     1563     1560     6529     6530     6573     6546
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-1
esel,s,type,,24
cm,contactElems61,elem
cmsel,a,_AllContacts,elem
cm,_AllContacts,elem
cmsel,s,contactElems61,elem
cmdele,contactElems61
keyo,cid,10,2              ! adjust contact stiffness each NR iteration
keyo,cid,6,2               ! Allow for aggressive changes to stiffness
keyo,cid,12,0              ! standard contact
mp,mu,cid,0.15	! unitless
keyo,cid,2,0               ! augmented Lagrange
keyo,cid,4,0               ! on Gauss point
keyo,cid,9,2               ! use real geometry with ramped effects
keyo,cid,7,0               ! No Prediction
rmod,cid,3,10.	! FKN
rmod,cid,5,0.	! ICONT
rmod,cid,6,0.	! PINB
rmod,cid,10,0.	! CNOF
rmod,cid,12,0.	! FKT
rmod,cid,36,61	! WB DSID
/com,*********** Create Contact "Frictional - RESORTE HEL DAIHATSU TERIOS II TRAS To RESORTE HEL DAIHATSU TERIOS II TRAS" ***********
*set,tid,27
*set,cid,26
r,tid
r,cid
et,tid,170
et,cid,174
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eblock,10,,,192
(15i9)
     9223       27       26       27        0     1313     1325     1326     1152     6047     6067     5674     5673
     9224       27       26       27        0     1159     1152     1326     1327     5672     5674     6068     5696
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-1
esel,s,type,,26
cm,contactElems62,elem
cmsel,a,_AllContacts,elem
cm,_AllContacts,elem
cmsel,s,contactElems62,elem
cmdele,contactElems62
keyo,cid,10,2              ! adjust contact stiffness each NR iteration
keyo,cid,6,2               ! Allow for aggressive changes to stiffness
keyo,cid,12,0              ! standard contact
mp,mu,cid,0.15	! unitless
keyo,cid,2,0               ! augmented Lagrange
keyo,cid,4,0               ! on Gauss point
keyo,cid,9,2               ! use real geometry with ramped effects
keyo,cid,7,0               ! No Prediction
rmod,cid,3,1.	! FKN
rmod,cid,5,0.	! ICONT
rmod,cid,6,0.	! PINB
rmod,cid,10,0.	! CNOF
rmod,cid,12,0.	! FKT
rmod,cid,36,62	! WB DSID
/com,*********** Create Contact "Frictional - RESORTE HEL DAIHATSU TERIOS II TRAS To RESORTE HEL DAIHATSU TERIOS II TRAS" ***********
*set,tid,29
*set,cid,28
r,tid
r,cid
et,tid,170
et,cid,174
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eblock,10,,,192
(15i9)
     9655       29       28       29        0     1313     1325     1326     1152     6047     6067     5674     5673
     9656       29       28       29        0     1159     1152     1326     1327     5672     5674     6068     5696
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-1
esel,s,type,,28
cm,contactElems219,elem
cmsel,a,_AllContacts,elem
cm,_AllContacts,elem
cmsel,s,contactElems219,elem
cmdele,contactElems219
keyo,cid,10,2              ! adjust contact stiffness each NR iteration
keyo,cid,6,2               ! Allow for aggressive changes to stiffness
keyo,cid,12,0              ! standard contact
mp,mu,cid,0.15	! unitless
keyo,cid,2,0               ! augmented Lagrange
keyo,cid,4,0               ! on Gauss point
keyo,cid,9,2               ! use real geometry with ramped effects
keyo,cid,7,0               ! No Prediction
rmod,cid,3,1.	! FKN
rmod,cid,5,0.	! ICONT
rmod,cid,6,0.	! PINB
rmod,cid,10,0.	! CNOF
rmod,cid,12,0.	! FKT
rmod,cid,36,219	! WB DSID
nsel,all
esel,all
nsel,all
/com,*********** Create Remote Point "Internal Remote Point 2" ***********
! -------- Remote Point Used by "Fixed - Ground To COPELA INFERIOR" --------
*set,_npilot,11546
_npilot39=_npilot
mat,7
real,7
type,7
en,9847,796,11546
csys,12
nrot,11546
csys,0
/com,*********** Create Remote Point "Internal Remote Point 4" ***********
! -------- Remote Point Used by "Translational - Ground To COPELA SUPERIOR" --------
*set,_npilot,11548
_npilot43=_npilot
mat,4
real,4
type,4
en,9848,414,11548
csys,13
nrot,11548
csys,0
/com,*********** Create Joint "Fixed - Ground To COPELA INFERIOR" ***********
d,11546,all                   ! body to ground Direct D
/com,*********** Create Joint "Translational - Ground To COPELA SUPERIOR" ***********
! Joint Element Type Declaration and Definition using MPC184
*set,_jid,30
et,_jid,184
keyo,_jid,1,10          ! Prismatic Joint
sectype,_jid, joint, pris, _wbjoint
secjoint,,13,13
mat,_jid
real,_jid
type,_jid
secnum,_jid
en,1974,,11548        ! body to ground joint
et,31,14             ! spring element type
/com,*********** Construct Weak Springs, Prototype 1 ***********
*set,_delta,13.9413938752198
type,31
mat,32
real,32
r,32,5.57655755008792e-003
nsel,all
*get,_nspr,ndmx
_nspr=_nspr+1
esel,s,mat,,1
nsle,s,active
*get,_minx,node,0,mnloc,x
*get,_miny,node,0,mnloc,y
*get,_minz,node,0,mnloc,z
*get,_maxx,node,0,mxloc,x
*get,_maxy,node,0,mxloc,y
*get,_maxz,node,0,mxloc,z
*dim,_ntets,arra,8
_ntets(1) = NODE(_minx,_miny,_minz)
_ntets(2) = NODE(_minx,_miny,_maxz)
_ntets(3) = NODE(_minx,_maxy,_minz)
_ntets(4) = NODE(_minx,_maxy,_maxz)
_ntets(5) = NODE(_maxx,_miny,_minz)
_ntets(6) = NODE(_maxx,_miny,_maxz)
_ntets(7) = NODE(_maxx,_maxy,_minz)
_ntets(8) = NODE(_maxx,_maxy,_maxz)
*do,_i,1,8
  n,_nspr,nx(_ntets(_i))+_delta,ny(_ntets(_i)),nz(_ntets(_i))
  e,_ntets(_i),_nspr
  d,_nspr,all
  _nspr=_nspr+1
  n,_nspr,nx(_ntets(_i)),ny(_ntets(_i))+_delta,nz(_ntets(_i))
  e,_ntets(_i),_nspr
  d,_nspr,all
  _nspr=_nspr+1
  n,_nspr,nx(_ntets(_i)),ny(_ntets(_i)),nz(_ntets(_i))+_delta
  e,_ntets(_i),_nspr
  d,_nspr,all
  _nspr=_nspr+1
*enddo
*set,_ntets
nsel,all
esel,all
/com,*********** Construct Weak Springs, Prototype 2 ***********
*set,_delta,10.7121430554355
type,31
mat,33
real,33
r,33,4.28485722217418e-003
nsel,all
*get,_nspr,ndmx
_nspr=_nspr+1
esel,s,mat,,2
nsle,s,active
*get,_minx,node,0,mnloc,x
*get,_miny,node,0,mnloc,y
*get,_minz,node,0,mnloc,z
*get,_maxx,node,0,mxloc,x
*get,_maxy,node,0,mxloc,y
*get,_maxz,node,0,mxloc,z
*dim,_ntets,arra,8
_ntets(1) = NODE(_minx,_miny,_minz)
_ntets(2) = NODE(_minx,_miny,_maxz)
_ntets(3) = NODE(_minx,_maxy,_minz)
_ntets(4) = NODE(_minx,_maxy,_maxz)
_ntets(5) = NODE(_maxx,_miny,_minz)
_ntets(6) = NODE(_maxx,_miny,_maxz)
_ntets(7) = NODE(_maxx,_maxy,_minz)
_ntets(8) = NODE(_maxx,_maxy,_maxz)
*do,_i,1,8
  n,_nspr,nx(_ntets(_i))+_delta,ny(_ntets(_i)),nz(_ntets(_i))
  e,_ntets(_i),_nspr
  d,_nspr,all
  _nspr=_nspr+1
  n,_nspr,nx(_ntets(_i)),ny(_ntets(_i))+_delta,nz(_ntets(_i))
  e,_ntets(_i),_nspr
  d,_nspr,all
  _nspr=_nspr+1
  n,_nspr,nx(_ntets(_i)),ny(_ntets(_i)),nz(_ntets(_i))+_delta
  e,_ntets(_i),_nspr
  d,_nspr,all
  _nspr=_nspr+1
*enddo
*set,_ntets
nsel,all
esel,all
/com,*********** Construct Weak Springs, Prototype 3 ***********
*set,_delta,18.1269748370595
type,31
mat,34
real,34
r,34,9.9811907235269e-004
nsel,all
*get,_nspr,ndmx
_nspr=_nspr+1
esel,s,mat,,3
nsle,s,active
*get,_minx,node,0,mnloc,x
*get,_miny,node,0,mnloc,y
*get,_minz,node,0,mnloc,z
*get,_maxx,node,0,mxloc,x
*get,_maxy,node,0,mxloc,y
*get,_maxz,node,0,mxloc,z
*dim,_ntets,arra,8
_ntets(1) = NODE(_minx,_miny,_minz)
_ntets(2) = NODE(_minx,_miny,_maxz)
_ntets(3) = NODE(_minx,_maxy,_minz)
_ntets(4) = NODE(_minx,_maxy,_maxz)
_ntets(5) = NODE(_maxx,_miny,_minz)
_ntets(6) = NODE(_maxx,_miny,_maxz)
_ntets(7) = NODE(_maxx,_maxy,_minz)
_ntets(8) = NODE(_maxx,_maxy,_maxz)
*do,_i,1,8
  n,_nspr,nx(_ntets(_i))+_delta,ny(_ntets(_i)),nz(_ntets(_i))
  e,_ntets(_i),_nspr
  d,_nspr,all
  _nspr=_nspr+1
  n,_nspr,nx(_ntets(_i)),ny(_ntets(_i))+_delta,nz(_ntets(_i))
  e,_ntets(_i),_nspr
  d,_nspr,all
  _nspr=_nspr+1
  n,_nspr,nx(_ntets(_i)),ny(_ntets(_i)),nz(_ntets(_i))+_delta
  e,_ntets(_i),_nspr
  d,_nspr,all
  _nspr=_nspr+1
*enddo
*set,_ntets
nsel,all
esel,all
/com,*********** Create Joint Drivers **********

*DIM,_loadvari95,TABLE,2,1,1,TIME,
! Time values
_loadvari95(1,0,1) = 0.
_loadvari95(2,0,1) = 1.
! Load values
_loadvari95(1,1,1) = 0.
_loadvari95(2,1,1) = 140.

fini
/com,****************************************************************************
/com,*************************    SOLUTION       ********************************
/com,****************************************************************************
/solu
antype,0                   ! static analysis
nlgeom,on                  ! Turn on Large Deformation Effects
eqsl,sparse,,,,,1
nropt,full                 ! Use full Newton-Raphson
cntr,print,1               ! print out contact info and also make no initial contact an error
dmpopt,emat,no             ! Don't combine emat file for DANSYS
dmpopt,esav,no             ! Don't combine esav file for DANSYS
nldiag,cont,iter           ! print out contact info each equilibrium iteration
resc,define,last,last,,dele	   ! Program Controlled
/com,****************************************************
/com,******************* SOLVE FOR LS 1 ****************
esel,s,type,,30
dj,all,ux,%_loadvari95%
esel,all
autots,on                   ! User turned on automatic time stepping
deltim,0.0001,1e-006,0.1,OFF
time,1.
outres,erase
outres,all,none
outres,nsol,-50
outres,rsol,-50
outres,nload,-50
outres,strs,-50
outres,epel,-50
outres,eppl,-50
outres,misc,-50,_AllContacts
outres,misc,-50
stabilize,off                   ! Stabilization turned OFF by user
cnvtol,f,,0.005,,0.01
cnvtol,,-1,3               ! User deleted Convergence, m
cnvtol,,-1,2               ! User deleted Convergence, u
cnvtol,,-1,4               ! User deleted Convergence, rot
nldiag,nrre,on,5
! *********** WB SOLVE COMMAND ***********
! check interactive state
*get,ANSINTER_,active,,int
*if,ANSINTER_,ne,0,then
/eof
*endif
solve
/com *************** Write FE CONNECTORS *********
CEWRITE,file,ce,,INTE
/com,****************************************************
/com,*************** FINISHED SOLVE FOR LS 1 *************
*set,_DS_PROGRESS          ! turn off progress updates to avoid virus scanning bug
/post1
fini
